# Расчет NTC резистора для платы управления "ВОДОРОД" проект Бутома ЛАК ПЧ400
ACP_max := 4096
U_ACP_max := 3.3  # В
R51 := 100  # кОм
Rntc10k_25C := 100  # кОм
i := 0 .. 31
NTC_C[i] := -55, -50, -45, -40, -35, -30, -25, -20, -15, -10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
NTC_Rt_R25[i] := 120.22, 85.48, 61.004, 43.712, 31.459, 22.746, 16.49, 12.071, 8.846, 6.544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
NTC_R[i] := Rntc10k_25C*NTC_Rt_R25[i]
NTC_R = [
    12022; 8548; 6100.4; 4371.2; 3145.9; 2274.6; 1649; 1207.1; 884.6; 654.4
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]
U_ACP[i] := U_ACP_max/(R51 + NTC_R[i])*NTC_R[i]
ACP[i] := ACP_max/U_ACP_max*U_ACP[i]
U_ACP[i] = [
    3.27278; 3.26184; 3.24678; 3.22619; 3.19833; 3.16103; 3.11132; 3.04753; 2.96484; 2.86257
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]
ACP[i] = [
    4062.21; 4048.64; 4029.94; 4004.39; 3969.81; 3923.51; 3861.81; 3782.63; 3679.99; 3553.05
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]
NTC_C[i] = [
    -55; -50; -45; -40; -35; -30; -25; -20; -15; -10
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]
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