# Расчет NTC резистора для платы управления "ВОДОРОД" проект Бутома ЛАК ПЧ400
ACP_max := 4096
U_ACP_max := 3.3  # В
R51 := 100  # кОм
Rвн_25C := 240  # кОм
Rвн_PPM := 100*10^-6 = 0.0001
ln(□)
Rntc10k_25C := 100  # кОм
i := 0 .. 31
Rвн[i] := Rвн_25C*(1 + (Rвн_PPM*(-NTC_C[i]/2 + 25)))  # error: Эта переменная не определена.
NTC_C[i] := -55, -50, -45, -40, -35, -30, -25, -20, -15, -10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
NTC_Rt_R25[i] := 120.22, 85.48, 61.004, 43.712, 31.459, 22.746, 16.49, 12.071, 8.846, 6.544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
NTC_R[i] := Rntc10k_25C*NTC_Rt_R25[i]
Rвн[i] := Rвн_25C
NTC_R[i] = [
    12022; 8548; 6100.4; 4371.2; 3145.9; 2274.6; 1649; 1207.1; 884.6; 654.4
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]
Rвн[i] = [
    240; 240; 240; 240; 240; 240; 240; 240; 240; 240
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]
NTC_R_Rвн[i] := NTC_R[i]*Rвн[i]/(NTC_R[i] + Rвн[i])
U_ACP[i] := U_ACP_max/(R51 + NTC_R_Rвн[i])*NTC_R_Rвн[i]
ACP[i] := ACP_max/U_ACP_max*U_ACP[i]
U_ACP[i] = [
    2.31581; 2.31033; 2.30277; 2.29239; 2.27829; 2.2593; 2.23379; 2.20072; 2.15727; 2.10261
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]
ACP[i] = [
    2874.42; 2867.61; 2858.22; 2845.35; 2827.84; 2804.27; 2772.61; 2731.56; 2677.63; 2609.78
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]
NTC_C[i] = [
    -55; -50; -45; -40; -35; -30; -25; -20; -15; -10
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]
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