# Расчет NTC резистора для платы управления "ВОДОРОД" проект Бутома ЛАК ПЧ400
ACP_max := 4096
U_ACP_max := 3.3  # В
R87 := 20  # кОм
Rntc10k_25C := 10  # кОм
i := 0 .. 31
NTC_C[i] := -55, -50, -45, -40, -35, -30, -25, -20, -15, -10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
NTC_Rt_R25[i] := 96.158, 66.892, 47.127, 33.606, 24.243, 17.681, 13.032, 9.702, 7.292, 5.531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
NTC_R[i] := Rntc10k_25C*NTC_Rt_R25[i]
NTC_R = [
    961.58; 668.92; 471.27; 336.06; 242.43; 176.81; 130.32; 97.02; 72.92; 55.31
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]
U_ACP[i] := U_ACP_max/(R87 + NTC_R[i])*NTC_R[i]
ACP[i] := ACP_max/U_ACP_max*U_ACP[i]
U_ACP[i] = [
    3.23276; 3.2042; 3.16565; 3.11464; 3.0485; 2.96465; 2.86094; 2.73599; 2.58971; 2.42362
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]
ACP[i] = [
    4012.54; 3977.09; 3929.25; 3865.93; 3783.84; 3679.76; 3551.03; 3395.95; 3214.38; 3008.23
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]
NTC_C[i] = [
    -55; -50; -45; -40; -35; -30; -25; -20; -15; -10
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]
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